*HEADING
 LARGE ROTATION VIA SPRING ELEMENT
*NODE
1,,,
2,9.949874371,1.0
*NSET,NSET=TWO
2,
*ELEMENT,TYPE=SPRINGA,ELSET=SPRING
1,1,2
*SPRING,ELSET=SPRING
200,
*STEP,NLGEOM,INC=30
*STATIC,DIRECT
0.033333334,1.0
*BOUNDARY
1,1,3
2,1
2,3
2,2,2,-3.0
*OUTPUT,FIELD
*NODE OUTPUT
U,RF
*END STEP
